// COMSOL Multiphysics 5.2.1.262 model "horno.mph"
// Estudio de horno industrial
// Estudio  para sacar la temperatura promedio y la distribucion dela temperatura
// Outline of the model tree

Geometry
  geom1 "Geometría 1" (2D, length unit m)
    r1: Rectangle "Rectángulo 1" | pos = {0, 0}; type = solid; base = corner; size = {3, 1}
    fin: Finalize "Formar unión"

Physics
  hteq: HeatEquation "Ecuación de calor" on all domains
    dependent variable u
    hteq1: HeatEquation "Ecuación de calor 1" (default) | f = 0
    zflx1: ZeroFluxBoundary "Flujo cero 1" (default)
    init1: init "Valores iniciales 1" (default)
    dir1: DirichletBoundary "Condición de contorno de la temperatura a la izquierda" on boundaries 1 | r = 300[degC]
    dir2: DirichletBoundary "Condición de contorno de LA TEMPERATURA A LA DERECHA" on boundaries 4 | r = 250[degC]

Mesh
  mesh1 "Malla 1" (physics-controlled)
    size: MeshSizeDefault "Tamaño" | hauto = 5

Studies
  std1 "Estudio 1"
    stat: Stationary "Estacionario"

Solver configurations
  sol1 "Solución 1" (study std1)
    v1: Variables "Variables dependientes 1"
    s1: Stationary "Resolvedor estacionario 1"
      dDef: Direct "Directo"
      fc1: FullyCoupled "Completamente acoplado 1" | linsolver = dDef

Datasets
  dset1: Solution | solution = sol1

Derived values
  av1: AvSurface "Superficie promedio 1" on domains 1 | data = dset1; table = tbl1; expr = u

Tables
  tbl1: Table "Tabla 1"
    // Superficie promedio 1 (u)
    Variable dependiente u (K)
    548.15

Plots
  pg1: PlotGroup2D "Grupo gráfico 2D 1" | data = dset1
    surf1: Surface "Superficie 1" | expr = u

Exports
  img1: Image2D "Imagen 2D 1"
    size = current
    weblockratio = off
    webwidth = 800
    webheight = 600
    webresolution = 96
    printlockratio = off
    printwidth = 120
    printheight = 90
    printresolution = 300
    jpegfilename = C:\Users\usu319\CATI\MSD\distribuciontemperatura.jpg
    options = on
    axes = on
  tbl1: Table "Tabla 1" | table = tbl1; filename = C:\Users\usu319\CATI\MSD\tablatemperatura.txt