// COMSOL Multiphysics 5.2.1.262 model "laberinto.mph"
// sin título
// Outline of the model tree

Geometry
  geom1 "Geometría 1" (2D, length unit m)
    r1: Rectangle "Rectángulo 1" | pos = {-1.05, -0.45}; size = {2.2, 1.3}
    r2: Rectangle "Rectángulo 2" | pos = {-0.7, -0.45}; size = {0.1, 0.65}
    r3: Rectangle "Rectángulo 3" | pos = {-0.3, 0.05}; size = {0.25, 0.8}
    r4: Rectangle "Rectángulo 4" | pos = {-0.05, 0.4}; size = {0.65, 0.1}
    sq1: Square "Cuadrado 1" | pos = {0.55, 0.6}; size = 0.25
    sq2: Square "Cuadrado 2" | pos = {0.8, 0.1}; size = 0.3
    r5: Rectangle "Rectángulo 5" | pos = {0.5, -0.45}; size = {0.2, 0.5}
    r6: Rectangle "Rectángulo 6" | pos = {-0.1, -0.15}; size = {0.6, 0.1}
    dif1: Difference "Diferencia 1" | input = r1; input2 = r2, r3, r4, r5, r6, sq1, sq2
    c1: Circle "Círculo 1" | pos = {-0.9, -0.3}; r = 0.05
    c2: Circle "Círculo 2" | pos = {0.05, 0.75}; r = 0.05
    dif2: Difference "Diferencia 2" | input = dif1; input2 = c1, c2
    fin: Finalize "Formar unión"

Physics
  hteq: HeatEquation "Ecuación de calor" on all domains
    dependent variable u
    hteq1: HeatEquation "Ecuación de calor 1" (default) | f = 0
    zflx1: ZeroFluxBoundary "Flujo cero 1" (default)
    init1: init "Valores iniciales 1" (default)
    dir1: DirichletBoundary "Juanito" on boundaries 33-36 | r = 1
    dir2: DirichletBoundary "Casa" on boundaries 37-40 | r = -1

Mesh
  mesh1 "Malla 1" (physics-controlled)
    size: MeshSizeDefault "Tamaño" | hauto = 5

Studies
  std1 "Estudio 1"
    stat: Stationary "Estacionario"

Solver configurations
  sol1 "Solución 1" (study std1)
    v1: Variables "Variables dependientes 1"
    s1: Stationary "Resolvedor estacionario 1"
      dDef: Direct "Directo"
      fc1: FullyCoupled "Completamente acoplado 1"

Datasets
  dset1: Solution | solution = sol1

Plots
  pg1: PlotGroup2D "Grupo gráfico 2D 1" | data = dset1
    surf1: Surface "Superficie 1" | expr = u
  pg2: PlotGroup2D "caminos" | data = dset1
    str1: Streamline "Línea de Flujo 1" on boundaries 33-36 | expr = {ux, uy}; selnumber = 100

Exports
  plot1: Plot "Gráfico 1" | filename = C:\Users\usu319\CATI\MSD\EntregaLaberinto\camino.txt