// COMSOL Multiphysics 5.2.1.262 model "puente.mph"
// sin título
// Outline of the model tree

Parameters
  yp = 10[m]  // parametro de la posicion x de la posicion del puente
  xp = 300[m]  // parametro de la posicon y del puente

Geometry
  geom1 "Geometría 1" (3D, length unit m)
    blk1: Block "Bloque 1" | size = {500, 30, 5}
    cyl1: Cylinder "Cilindro 1" | pos = {xp, yp, -100}; r = 5; h = 100
    fin: Finalize "Formar unión"

Materials
  mat1: Common "Concrete" on all domains
    def "Básico"
      thermalexpansioncoefficient = 10e-6[1/K]
      density = 2300[kg/m^3]
      thermalconductivity = 1.8[W/(m*K)]
      heatcapacity = 880[J/(kg*K)]
    Enu "Módulo de Young y coeficiente de Poisson"
      youngsmodulus = 25e9[Pa]
      poissonsratio = 0.20
  mat2: Common "Structural steel" on domains 2
    def "Básico"
      relpermeability = 1
      heatcapacity = 475[J/(kg*K)]
      thermalconductivity = 44.5[W/(m*K)]
      electricconductivity = 4.032e6[S/m]
      relpermittivity = 1
      thermalexpansioncoefficient = 12.3e-6[1/K]
      density = 7850[kg/m^3]
    Enu "Módulo de Young y coeficiente de Poisson"
      youngsmodulus = 200e9[Pa]
      poissonsratio = 0.30
    Murnaghan
      l = -3.0e11[Pa]
      m = -6.2e11[Pa]
      n = -7.2e11[Pa]
    Lame "Parámetros de Lamé"
      lambLame = 1.15e11[Pa]
      muLame = 7.69e10[Pa]

Physics
  solid: SolidMechanics "Mecánica de sólidos" on all domains
    dependent variable u = {u, v, w}
    lemm1: LinearElasticModel "Material elástico lineal 1" (default)
    free1: Free "Libre 1" (default)
    init1: init "Valores iniciales 1" (default)
    disp1: Displacement2 "Desplazamiento prescrito 1" on boundaries 1, 8, 12 | Direction = {1, 1, 1}
    bndl1: BoundaryLoad "Carga superficial 1" on boundaries 4 | FperArea = {0, 0, -10000}

Mesh
  mesh1 "Malla 1" (physics-controlled)
    size: MeshSizeDefault "Tamaño" | hauto = 5

Studies
  std1 "Estudio 1"
    stat: Stationary "Estacionario"

Solver configurations
  sol1 "Solución 1" (study std1)
    v1: Variables "Variables dependientes 1"
    s1: Stationary "Resolvedor estacionario 1"
      dDef: Direct "Directo"
      fc1: FullyCoupled "Completamente acoplado 1" | linsolver = dDef; termonres = auto; reserrfact = 1000

Datasets
  dset1: Solution | solution = sol1

Derived values
  int1: IntVolume "Integración volumétrica 1" on domains 1 | data = dset1; table = tbl1; expr = solid.disp

Tables
  tbl1: Table "Tabla 1"
    // Integración volumétrica 1 (solid.disp)
    Desplazamiento total (m^4) | Desplazamiento total (m^4) | Desplazamiento total (m^4) | Desplazamiento total (m^4) | Desplazamiento total (m^4)
    82573 | 15001.6 | 42120.8 | 17301.1 | 21475.5

Plots
  pg1: PlotGroup3D "Esfuerzo (solid)" | data = dset1
    surf1: Surface "Superficie 1" | expr = solid.disp
      def: Deform "Deformación" | expr = {u, v, w}